*Heading
** Job name: BRBRUN Model name: Model-1
** Generated by: Abaqus/CAE 2018
*Preprint, echo=NO, model=NO, history=NO, contact=NO
** ----------------------------------------------------------------
**
** PART INSTANCE: BRB_BOT-1
**
*System
   -0.117856,     -0.0127,    0.003175,    0.882144,     -0.0127,    0.003175
   -0.117856,-0.0126999999999999,   -0.996825
*Node
      1, 0.0571499988, 0.00317499996, 0.0253999997
      2, 0.0571499988, 0.00317499996, 0.0126999998
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*Element, type=C3D8R
   1,   603,  3894,  9598,  2958,     1,   112,  2022,   353
   2,  3894,  3895,  9599,  9598,   112,   113,  2023,  2022
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*Nset, nset=BRB_BOT-1_Set-1, generate
     1,  18413,      1
*Elset, elset=BRB_BOT-1_Set-1, generate
     1,  14740,      1
** Section: Section-1
*Solid Section, elset=BRB_BOT-1_Set-1, material=STEEL
,
** ----------------------------------------------------------------
**
** PART INSTANCE: BRB_TOP-1
**
*System
    0.249301,     -0.0127,      0.0127,    1.249301,     -0.0127,      0.0127
    0.249301,-0.0126999999999999,     -0.9873
*Node
  18414, -0.294830501, 0.0126999998, 0.0126999998
  18415, -0.297359914, 0.0126999998, 0.0126999998
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*Element, type=C3D8R
14741, 18456, 18457, 18464, 18463, 18414, 18415, 18422, 18421
14742, 18457, 18458, 18465, 18464, 18415, 18416, 18423, 18422
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*Nset, nset=BRB_TOP-1_Set-1, generate
 18414,  36826,      1
*Elset, elset=BRB_TOP-1_Set-1, generate
 14741,  29480,      1
** Section: Section-1
*Solid Section, elset=BRB_TOP-1_Set-1, material=STEEL
,
** ----------------------------------------------------------------
**
** PART INSTANCE: BOLT-1
**
*System
   -0.030353,          0.,-0.019446875,    0.969647,          0.,-0.019446875
*Node
  36827, 0.00396875013,           0., 0.00515937479
  36828, 0.00396875013,           0., 0.0194463748
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*Element, type=C3D8R
29481, 36851, 36850, 36926, 36927, 36949, 36948, 37150, 37151
29482, 36925, 36919, 36929, 36921, 37149, 37143, 37153, 37145
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*Nset, nset=BOLT-1_Set-1, generate
36827, 37303,    1
*Elset, elset=BOLT-1_Set-1, generate
29481, 29794,    1
** Section: Section-1
*Solid Section, elset=BOLT-1_Set-1, material=STEEL
,
** ----------------------------------------------------------------
**
** PART INSTANCE: WASHER-1
**
*System
   -0.030353,          0.,  -0.0142875,    0.969647,          0.,  -0.0142875
*Node
  37304, 0.00378074218, 0.00218281243,           0.
  37305, 0.00218281243, 0.00378074218,           0.
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*Element, type=C3D8R
29795, 37394, 37374, 37373, 37398, 37338, 37318, 37317, 37342
29796, 37395, 37394, 37361, 37396, 37339, 37338, 37305, 37340
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*Nset, nset=WASHER-1_Set-1, generate
37304, 37415,    1
*Elset, elset=WASHER-1_Set-1, generate
29795, 29833,   1
** Section: Section-1
*Solid Section, elset=WASHER-1_Set-1, material=STEEL
,
** ----------------------------------------------------------------
**
** PART INSTANCE: BOLT-2
**
*System
          0.,          0.,-0.019446875,          1.,          0.,-0.019446875
*Node
  37416, 0.00396875013,           0., 0.00515937479
  37417, 0.00396875013,           0., 0.0194463748
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*Element, type=C3D8R
29834, 37440, 37439, 37515, 37516, 37538, 37537, 37739, 37740
29835, 37514, 37508, 37518, 37510, 37738, 37732, 37742, 37734
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*Nset, nset=BOLT-2_Set-1, generate
37416, 37892,    1
*Elset, elset=BOLT-2_Set-1, generate
29834, 30147,    1
** Section: Section-1
*Solid Section, elset=BOLT-2_Set-1, material=STEEL
,
** ----------------------------------------------------------------
**
** PART INSTANCE: WASHER-2
**
*System
          0.,          0.,  -0.0142875,          1.,          0.,  -0.0142875
*Node
  37893, 0.00378074218, 0.00218281243,           0.
  37894, 0.00218281243, 0.00378074218,           0.
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*Element, type=C3D8R
30148, 37983, 37963, 37962, 37987, 37927, 37907, 37906, 37931
30149, 37984, 37983, 37950, 37985, 37928, 37927, 37894, 37929
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*Nset, nset=WASHER-2_Set-1, generate
37893, 38004,    1
*Elset, elset=WASHER-2_Set-1, generate
30148, 30186,   1
** Section: Section-1
*Solid Section, elset=WASHER-2_Set-1, material=STEEL
,
** ----------------------------------------------------------------
**
** PART INSTANCE: BOLT-3
**
*System
    0.030353,          0.,-0.019446875,    1.030353,          0.,-0.019446875
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*Elset, elset=BOLT-3_Set-1, generate
30187, 30500,    1
** Section: Section-1
*Solid Section, elset=BOLT-3_Set-1, material=STEEL
,
** ----------------------------------------------------------------
**
** PART INSTANCE: WASHER-3
**
*System
    0.030353,          0.,  -0.0142875,    1.030353,          0.,  -0.0142875
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*Elset, elset=WASHER-3_Set-1, generate
30501, 30539,   1
** Section: Section-1
*Solid Section, elset=WASHER-3_Set-1, material=STEEL
,
** ----------------------------------------------------------------
**
** PART INSTANCE: NUT-1
**
*System
   -0.030353,          0.,   0.0142875,    0.969647,          0.,   0.0142875
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*Elset, elset=NUT-1_Set-1, generate
30540, 30577,   1
** Section: Section-1
*Solid Section, elset=NUT-1_Set-1, material=STEEL
,
** ----------------------------------------------------------------
**
** PART INSTANCE: WASHER-4
**
*System
   -0.030353,          0.,      0.0127,    0.969647,          0.,      0.0127
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*Elset, elset=WASHER-4_Set-1, generate
30578, 30616,   1
** Section: Section-1
*Solid Section, elset=WASHER-4_Set-1, material=STEEL
,
** ----------------------------------------------------------------
**
** PART INSTANCE: NUT-2
**
*System
          0.,          0.,   0.0142875,          1.,          0.,   0.0142875
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*Elset, elset=NUT-2_Set-1, generate
30617, 30654,   1
** Section: Section-1
*Solid Section, elset=NUT-2_Set-1, material=STEEL
,
** ----------------------------------------------------------------
**
** PART INSTANCE: WASHER-5
**
*System
          0.,          0.,      0.0127,          1.,          0.,      0.0127
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*Elset, elset=WASHER-5_Set-1, generate
30655, 30693,   1
** Section: Section-1
*Solid Section, elset=WASHER-5_Set-1, material=STEEL
,
** ----------------------------------------------------------------
**
** PART INSTANCE: NUT-3
**
*System
    0.030353,          0.,   0.0142875,    1.030353,          0.,   0.0142875
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*Elset, elset=NUT-3_Set-1, generate
30694, 30731,   1
** Section: Section-1
*Solid Section, elset=NUT-3_Set-1, material=STEEL
,
** ----------------------------------------------------------------
**
** PART INSTANCE: WASHER-6
**
*System
    0.030353,          0.,      0.0127,    1.030353,          0.,      0.0127
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*Elset, elset=WASHER-6_Set-1, generate
30732, 30770,   1
** Section: Section-1
*Solid Section, elset=WASHER-6_Set-1, material=STEEL
,
** ----------------------------------------------------------------
**
** PART INSTANCE: B1SHANK
**
*System
  -0.0303534,          0.,    0.016867,   0.9696466,          0.,    0.016867
*Node
  39227,           0.,           0.,           0.
*Nset, nset=B1SHANK-RefPt_
39227,
** ----------------------------------------------------------------
**
** PART INSTANCE: B2SHANK
**
*System
-4.00000000011502e-07,          0.,    0.016867,   0.9999996,          0.,    0.016867
*Node
  39228,           0.,           0.,           0.
*Nset, nset=B2SHANK-RefPt_
39228,
** ----------------------------------------------------------------
**
** PART INSTANCE: B3SHANK
**
*System
   0.0303526,          0.,    0.016867,   1.0303526,          0.,    0.016867
*Node
  39229,           0.,           0.,           0.
*Nset, nset=B3SHANK-RefPt_
39229,
** ----------------------------------------------------------------
**
** PART INSTANCE: N1SHANK
**
*System
  -0.0303534,          0.,    0.016867,   0.9696466,          0.,    0.016867
*Node
  39230,           0.,           0.,           0.
*Nset, nset=N1SHANK-RefPt_
39230,
** ----------------------------------------------------------------
**
** PART INSTANCE: N2SHANK
**
*System
-4.00000000011502e-07,          0.,    0.016867,   0.9999996,          0.,    0.016867
*Node
  39231,           0.,           0.,           0.
*Nset, nset=N2SHANK-RefPt_
39231,
** ----------------------------------------------------------------
**
** PART INSTANCE: N3SHANK
**
*System
   0.0303526,          0.,    0.016867,   1.0303526,          0.,    0.016867
*Node
  39232,           0.,           0.,           0.
*Nset, nset=N3SHANK-RefPt_
39232,
*System
*Nset, nset=BSHANK1m
39227,
*Nset, nset=BSHANK2m
39228,
*Nset, nset=BSHANK3m
39229,
*Nset, nset=CB, unsorted
   26, 1195, 1194, 1193, 1192, 1191
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*Nset, nset=CT, unsorted
18414,18415,18416,18417,18418,18419
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*Nset, nset=ENDNDS, unsorted
 29097,
*Nset, nset=ENDNDS, unsorted
 3,
*Nset, nset=NSHANK1m
39230,
*Nset, nset=NSHANK2m
39231,
*Nset, nset=NSHANK3m
39232,
*Nset, nset=BOLTNUTSHANK, unsorted
 39227, 39228, 39229, 39230, 39231, 39232
*Elset, elset=_B1MPLANE_S2, generate
29556, 29570,   1
*Surface, type=ELEMENT, name=B1MPLANE
_B1MPLANE_S2, S2
*Elset, elset=_B2MPLANE_S2, generate
29909, 29923,   1
*Surface, type=ELEMENT, name=B2MPLANE
_B2MPLANE_S2, S2
*Elset, elset=_B3MPLANE_S2, generate
30262, 30276,   1
*Surface, type=ELEMENT, name=B3MPLANE
_B3MPLANE_S2, S2
*Elset, elset=_BOLTBOTSURF_S2, generate
29706, 29720,    1
*Elset, elset=_BOLTBOTSURF_S2, generate
30412, 30426,    1
*Elset, elset=_BOLTBOTSURF_S2, generate
30059, 30073,    1
*Surface, type=ELEMENT, name=BOLTBOTSURF
_BOLTBOTSURF_S2, S2
*Elset, elset=_BOTS_S4
  8900,  8902,  8904,  8906,  8908,  8910
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*Elset, elset=_BOTS_S3
  8851,  8852,  8853,  8857,  8858,  8859
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*Elset, elset=_BOTS_S2
 12521, 12522, 12523, 12524, 12525, 12526
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*Elset, elset=_BOTS_S6
  8986,  8991,  8996,  9001,  9006,  9011
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*Elset, elset=_BOTS_S5
 14509, 14510, 14519, 14520, 14529, 14530
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*Surface, type=ELEMENT, name=BOTS
_BOTS_S4, S4
_BOTS_S3, S3
_BOTS_S2, S2
_BOTS_S6, S6
_BOTS_S5, S5
*Elset, elset=_BSHANK1s_S3
29661,29663,29664,29667,29671,29674,29676,29678,29679,29682,29686,29689
*Elset, elset=_BSHANK1s_S4
29668,29669,29675,29683,29684,29690
*Elset, elset=_BSHANK1s_S6
29670,29685
*Surface, type=ELEMENT, name=BSHANK1s
_BSHANK1s_S3, S3
_BSHANK1s_S4, S4
_BSHANK1s_S6, S6
*Elset, elset=_BSHANK2s_S3
30014,30016,30017,30020,30024,30027,30029,30031,30032,30035,30039,30042
*Elset, elset=_BSHANK2s_S4
30021,30022,30028,30036,30037,30043
*Elset, elset=_BSHANK2s_S6
30023,30038
*Surface, type=ELEMENT, name=BSHANK2s
_BSHANK2s_S3, S3
_BSHANK2s_S4, S4
_BSHANK2s_S6, S6
*Elset, elset=_BSHANK3s_S3
30367,30369,30370,30373,30377,30380,30382,30384,30385,30388,30392,30395
*Elset, elset=_BSHANK3s_S4
30374,30375,30381,30389,30390,30396
*Elset, elset=_BSHANK3s_S6
30376,30391
*Surface, type=ELEMENT, name=BSHANK3s
_BSHANK3s_S3, S3
_BSHANK3s_S4, S4
_BSHANK3s_S6, S6
*Elset, elset=_CB1s_S6
  8986,  8991,  8996,  9001,  9006,  9011
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*Surface, type=ELEMENT, name=CB1s
_CB1s_S6, S6
*Elset, elset=_CB2s_S4
  8900,  8902,  8904,  8906,  8908,  8910
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*Elset, elset=_CB2s_S3
  8851,  8852,  8853,  8857,  8858,  8859
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*Elset, elset=_CB2s_S2
 12521, 12522, 12523, 12524, 12525, 12526
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*Elset, elset=_CB2s_S6
 12371, 12376, 12381, 12386, 12391, 12396
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*Surface, type=ELEMENT, name=CB2s
_CB2s_S4, S4
_CB2s_S3, S3
_CB2s_S2, S2
_CB2s_S6, S6
*Elset, elset=_CB3s_S4
 12660, 12662, 12664, 12666, 12668, 12670
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*Elset, elset=_CB3s_S3
 12626, 12628, 12630, 12671, 12672, 12673
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*Elset, elset=_CB3s_S2
 14039, 14040, 14041, 14042, 14043, 14044
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*Surface, type=ELEMENT, name=CB3s
_CB3s_S4, S4
_CB3s_S3, S3
_CB3s_S2, S2
*Elset, elset=_CB4s_S4
 13186, 13189, 13192, 13195, 13198, 13201
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*Elset, elset=_CB4s_S3
 13175, 13178, 13181, 13241, 13242, 13243
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*Elset, elset=_CB4s_S6, generate
 13721,  13776,      5
*Elset, elset=_CB4s_S5
 14509, 14510, 14519, 14520, 14529, 14530
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*Elset, elset=_CB4s_S2
 13250, 13251, 13252, 13253, 13254, 13255, 13268, 13269, 13270, 13271, 13272, 13273
*Surface, type=ELEMENT, name=CB4s
_CB4s_S4, S4
_CB4s_S3, S3
_CB4s_S6, S6
_CB4s_S2, S2
_CB4s_S5, S5
*Elset, elset=_CB5s_S6, generate
 13571,  13716,      5
*Elset, elset=_CB5s_S4, generate
 13290,  13435,      5
*Surface, type=ELEMENT, name=CB5s
_CB5s_S6, S6
_CB5s_S4, S4
*Elset, elset=_CT1s_S3
14741,14742,14743,14744,14745,14746
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*Surface, type=ELEMENT, name=CT1s
_CT1s_S3, S3
*Elset, elset=_CT2s_S4
15085,15088,15091,15094,15097,15100
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*Elset, elset=_CT2s_S3
15041,15042,15043,15050,15051,15052
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*Elset, elset=_CT2s_S2
15131,15132,15133,15134,15135,15136
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*Elset, elset=_CT2s_S5
15184,15185,15194,15195,15204,15205
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*Surface, type=ELEMENT, name=CT2s
_CT2s_S4, S4
_CT2s_S3, S3
_CT2s_S2, S2
_CT2s_S5, S5
*Elset, elset=_CT3s_S3
16496,16497,16502,16503,16508,16509
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*Elset, elset=_CT3s_S4
16335,16340,16345,16350,16355,16360
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*Elset, elset=_CT3s_S2
16901,16902,16903,16907,16908,16909
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*Elset, elset=_CT3s_S6
16391,16396,16401,16406,16411,16416
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*Surface, type=ELEMENT, name=CT3s
_CT3s_S3, S3
_CT3s_S4, S4
_CT3s_S2, S2
_CT3s_S6, S6
*Elset, elset=_CT4s_S5
15829,15830,15839,15840,15849,15850
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*Elset, elset=_CT4s_S3
15956,15957,15962,15963,15968,15969
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*Elset, elset=_CT4s_S4
15949,15952,15955,15994,15997,16000
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*Elset, elset=_CT4s_S2
16049,16050,16051,16052,16053,16054
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*Surface, type=ELEMENT, name=CT4s
_CT4s_S5, S5
_CT4s_S3, S3
_CT4s_S4, S4
_CT4s_S2, S2
*Elset, elset=_CT5s_S5
17270,17271,17272,17273,17274,17275
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*Surface, type=ELEMENT, name=CT5s
_CT5s_S5, S5
*Elset, elset=_NSHANK1s_S4
30540,30543,30545,30546,30551,30552,30559,30562,30564,30565,30570,30571
*Elset, elset=_NSHANK1s_S3
30547,30553,30566,30572
*Elset, elset=_NSHANK1s_S5
30549,30568
*Elset, elset=_NSHANK1s_S6
30556,30575
*Surface, type=ELEMENT, name=NSHANK1s
_NSHANK1s_S4, S4
_NSHANK1s_S3, S3
_NSHANK1s_S6, S6
_NSHANK1s_S5, S5
*Elset, elset=_NSHANK2s_S4
30617,30620,30622,30623,30628,30629,30636,30639,30641,30642,30647,30648
*Elset, elset=_NSHANK2s_S3
30624,30630,30643,30649
*Elset, elset=_NSHANK2s_S5
30626,30645
*Elset, elset=_NSHANK2s_S6
30633,30652
*Surface, type=ELEMENT, name=NSHANK2s
_NSHANK2s_S4, S4
_NSHANK2s_S3, S3
_NSHANK2s_S6, S6
_NSHANK2s_S5, S5
*Elset, elset=_NSHANK3s_S4
30694,30697,30699,30700,30705,30706,30713,30716,30718,30719,30724,30725
*Elset, elset=_NSHANK3s_S3
30701,30707,30720,30726
*Elset, elset=_NSHANK3s_S5
30703,30722
*Elset, elset=_NSHANK3s_S6
30710,30729
*Surface, type=ELEMENT, name=NSHANK3s
_NSHANK3s_S4, S4
_NSHANK3s_S3, S3
_NSHANK3s_S6, S6
_NSHANK3s_S5, S5
*Elset, elset=_NUT1BOLTm_S3
29571,29573,29574,29577,29581,29584
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*Elset, elset=_NUT1BOLTm_S4
29578,29579,29585,29593,29594,29600
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*Elset, elset=_NUT1BOLTm_S6, generate
29580, 29715,   15
*Surface, type=ELEMENT, name=NUT1BOLTm
_NUT1BOLTm_S3, S3
_NUT1BOLTm_S4, S4
_NUT1BOLTm_S6, S6
*Elset, elset=_NUT1BOLTs_S4
30540,30543,30545,30546,30551,30552,30559,30562,30564,30565,30570,30571
*Elset, elset=_NUT1BOLTs_S3
30547,30553,30566,30572
*Elset, elset=_NUT1BOLTs_S5
30549,30568
*Elset, elset=_NUT1BOLTs_S6
30556,30575
*Surface, type=ELEMENT, name=NUT1BOLTs
_NUT1BOLTs_S4, S4
_NUT1BOLTs_S3, S3
_NUT1BOLTs_S6, S6
_NUT1BOLTs_S5, S5
*Elset, elset=_NUT2BOLTm_S3
29924,29926,29927,29930,29934,29937
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*Elset, elset=_NUT2BOLTm_S4
29931,29932,29938,29946,29947,29953
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*Elset, elset=_NUT2BOLTm_S6, generate
29933, 30068,   15
*Surface, type=ELEMENT, name=NUT2BOLTm
_NUT2BOLTm_S3, S3
_NUT2BOLTm_S4, S4
_NUT2BOLTm_S6, S6
*Elset, elset=_NUT2BOLTs_S4
30617,30620,30622,30623,30628,30629,30636,30639,30641,30642,30647,30648
*Elset, elset=_NUT2BOLTs_S3
30624,30630,30643,30649
*Elset, elset=_NUT2BOLTs_S5
30626,30645
*Elset, elset=_NUT2BOLTs_S6
30633,30652
*Surface, type=ELEMENT, name=NUT2BOLTs
_NUT2BOLTs_S4, S4
_NUT2BOLTs_S3, S3
_NUT2BOLTs_S6, S6
_NUT2BOLTs_S5, S5
*Elset, elset=_NUT3BOLTm_S3
30277,30279,30280,30283,30287,30290
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*Elset, elset=_NUT3BOLTm_S4
30284,30285,30291,30299,30300,30306
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*Elset, elset=_NUT3BOLTm_S6, generate
30286, 30421,   15
*Surface, type=ELEMENT, name=NUT3BOLTm
_NUT3BOLTm_S3, S3
_NUT3BOLTm_S4, S4
_NUT3BOLTm_S6, S6
*Elset, elset=_NUT3BOLTs_S4
30694,30697,30699,30700,30705,30706,30713,30716,30718,30719,30724,30725
*Elset, elset=_NUT3BOLTs_S3
30701,30707,30720,30726
*Elset, elset=_NUT3BOLTs_S5
30703,30722
*Elset, elset=_NUT3BOLTs_S6
30710,30729
*Surface, type=ELEMENT, name=NUT3BOLTs
_NUT3BOLTs_S4, S4
_NUT3BOLTs_S3, S3
_NUT3BOLTs_S6, S6
_NUT3BOLTs_S5, S5
*Elset, elset=_NUTBOTSURF_S2, generate
30559, 30577,   1
*Elset, elset=_NUTBOTSURF_S2, generate
30636, 30654,   1
*Elset, elset=_NUTBOTSURF_S2, generate
30713, 30731,   1
*Surface, type=ELEMENT, name=NUTBOTSURF
_NUTBOTSURF_S2, S2
*Elset, elset=_TOPS_S5
15184,15185,15194,15195,15204,15205
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*Elset, elset=_TOPS_S3
14741,14742,14743,14744,14745,14746
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*Elset, elset=_TOPS_S4
15085,15088,15091,15094,15097,15100
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*Elset, elset=_TOPS_S2
15131,15132,15133,15134,15135,15136
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*Elset, elset=_TOPS_S6
16391,16396,16401,16406,16411,16416
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*Surface, type=ELEMENT, name=TOPS
_TOPS_S5, S5
_TOPS_S3, S3
_TOPS_S4, S4
_TOPS_S2, S2
_TOPS_S6, S6
*Elset, elset=_W1BOLTm_S1, generate
29736, 29757,    1
*Surface, type=ELEMENT, name=W1BOLTm
_W1BOLTm_S1, S1
*Elset, elset=_W1BOLTs_S2, generate
29795, 29833,   1
*Surface, type=ELEMENT, name=W1BOLTs
_W1BOLTs_S2, S2
*Elset, elset=_W1BOTm_S4
 12375, 12380, 12385, 12390, 12395, 12400
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*Elset, elset=_W1BOTm_S5
 14689, 14690, 14699, 14700, 14709, 14710, 14719, 14720, 14729, 14730, 14739, 14740
*Surface, type=ELEMENT, name=W1BOTm
_W1BOTm_S4, S4
_W1BOTm_S5, S5
*Elset, elset=_W1BOTs_S2, generate
30578, 30616,   1
*Surface, type=ELEMENT, name=W1BOTs
_W1BOTs_S2, S2
*Elset, elset=_W1NUTm_S1, generate
30540, 30558,   1
*Surface, type=ELEMENT, name=W1NUTm
_W1NUTm_S1, S1
*Elset, elset=_W1NUTs_S1, generate
30578, 30616,   1
*Surface, type=ELEMENT, name=W1NUTs
_W1NUTs_S1, S1
*Elset, elset=_W1TOPm_S6
15236,15241,15246,15251,15256,15261
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*Elset, elset=_W1TOPm_S3
15176,15177,15186,15187,15196,15197
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*Surface, type=ELEMENT, name=W1TOPm
_W1TOPm_S6, S6
_W1TOPm_S3, S3
*Elset, elset=_W1TOPs_S1, generate
29795, 29833,   1
*Surface, type=ELEMENT, name=W1TOPs
_W1TOPs_S1, S1
*Elset, elset=_W2BOLTm_S1, generate
30089, 30110,    1
*Surface, type=ELEMENT, name=W2BOLTm
_W2BOLTm_S1, S1
*Elset, elset=_W2BOLTs_S2, generate
30148, 30186,   1
*Surface, type=ELEMENT, name=W2BOLTs
_W2BOLTs_S2, S2
*Elset, elset=_W2BOTm_S5
 14629, 14630, 14639, 14640, 14649, 14650, 14659, 14660, 14669, 14670, 14679, 14680
*Elset, elset=_W2BOTm_S6
 13091, 13096, 13101, 13106, 13111, 13116
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*Surface, type=ELEMENT, name=W2BOTm
_W2BOTm_S5, S5
_W2BOTm_S6, S6
*Elset, elset=_W2BOTs_S2, generate
30655, 30693,   1
*Surface, type=ELEMENT, name=W2BOTs
_W2BOTs_S2, S2
*Elset, elset=_W2NUTm_S1, generate
30617, 30635,   1
*Surface, type=ELEMENT, name=W2NUTm
_W2NUTm_S1, S1
*Elset, elset=_W2NUTs_S1, generate
30655, 30693,   1
*Surface, type=ELEMENT, name=W2NUTs
_W2NUTs_S1, S1
*Elset, elset=_W2TOPm_S4
16395,16400,16405,16410,16415,16420
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*Elset, elset=_W2TOPm_S6
16331,16336,16341,16346,16351,16356
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*Surface, type=ELEMENT, name=W2TOPm
_W2TOPm_S4, S4
_W2TOPm_S6, S6
*Elset, elset=_W2TOPs_S1, generate
30148, 30186,   1
*Surface, type=ELEMENT, name=W2TOPs
_W2TOPs_S1, S1
*Elset, elset=_W3BOLTm_S1, generate
30442, 30463,    1
*Surface, type=ELEMENT, name=W3BOLTm
_W3BOLTm_S1, S1
*Elset, elset=_W3BOLTs_S2, generate
30501, 30539,   1
*Surface, type=ELEMENT, name=W3BOLTs
_W3BOLTs_S2, S2
*Elset, elset=_W3BOTm_S3
 14501, 14502, 14511, 14512, 14521, 14522
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*Elset, elset=_W3BOTm_S6, generate
 14441,  14496,      5
*Elset, elset=_W3BOTm_S4, generate
 13725,  13780,      5
*Surface, type=ELEMENT, name=W3BOTm
_W3BOTm_S3, S3
_W3BOTm_S6, S6
_W3BOTm_S4, S4
*Elset, elset=_W3BOTs_S2, generate
30732, 30770,   1
*Surface, type=ELEMENT, name=W3BOTs
_W3BOTs_S2, S2
*Elset, elset=_W3NUTm_S1, generate
30694, 30712,   1
*Surface, type=ELEMENT, name=W3NUTm
_W3NUTm_S1, S1
*Elset, elset=_W3NUTs_S1, generate
30732, 30770,   1
*Surface, type=ELEMENT, name=W3NUTs
_W3NUTs_S1, S1
*Elset, elset=_W3TOPm_S3
15821,15822,15831,15832,15841,15842
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*Surface, type=ELEMENT, name=W3TOPm
_W3TOPm_S3, S3
*Elset, elset=_W3TOPs_S1, generate
30501, 30539,   1
*Surface, type=ELEMENT, name=W3TOPs
_W3TOPs_S1, S1
** Constraint: BSHANK1
*Coupling, constraint name=BSHANK1, ref node=BSHANK1m, surface=BSHANK1s
*Distributing, weighting method=UNIFORM, coupling=STRUCTURAL
** Constraint: BSHANK2
*Coupling, constraint name=BSHANK2, ref node=BSHANK2m, surface=BSHANK2s
*Distributing, weighting method=UNIFORM, coupling=STRUCTURAL
** Constraint: BSHANK3
*Coupling, constraint name=BSHANK3, ref node=BSHANK3m, surface=BSHANK3s
*Distributing, weighting method=UNIFORM, coupling=STRUCTURAL
** Constraint: NSHANK1
*Coupling, constraint name=NSHANK1, ref node=NSHANK1m, surface=NSHANK1s
*Distributing, weighting method=UNIFORM, coupling=STRUCTURAL
** Constraint: NSHANK2
*Coupling, constraint name=NSHANK2, ref node=NSHANK2m, surface=NSHANK2s
*Distributing, weighting method=UNIFORM, coupling=STRUCTURAL
** Constraint: NSHANK3
*Coupling, constraint name=NSHANK3, ref node=NSHANK3m, surface=NSHANK3s
*Distributing, weighting method=UNIFORM, coupling=STRUCTURAL
** Constraint: NUTBOLT11
*Equation
2
BSHANK1m, 1, 1.
NSHANK1m, 1, -1.
** Constraint: NUTBOLT12
*Equation
2
BSHANK1m, 2, 1.
NSHANK1m, 2, -1.
** Constraint: NUTBOLT14
*Equation
2
BSHANK1m, 4, 1.
NSHANK1m, 4, -1.
** Constraint: NUTBOLT15
*Equation
2
BSHANK1m, 5, 1.
NSHANK1m, 5, -1.
** Constraint: NUTBOLT16
*Equation
2
BSHANK1m, 6, 1.
NSHANK1m, 6, -1.
** Constraint: NUTBOLT21
*Equation
2
BSHANK2m, 1, 1.
NSHANK2m, 1, -1.
** Constraint: NUTBOLT22
*Equation
2
BSHANK2m, 2, 1.
NSHANK2m, 2, -1.
** Constraint: NUTBOLT24
*Equation
2
BSHANK2m, 4, 1.
NSHANK2m, 4, -1.
** Constraint: NUTBOLT25
*Equation
2
BSHANK2m, 5, 1.
NSHANK2m, 5, -1.
** Constraint: NUTBOLT26
*Equation
2
BSHANK2m, 6, 1.
NSHANK2m, 6, -1.
** Constraint: NUTBOLT31
*Equation
2
BSHANK3m, 1, 1.
NSHANK3m, 1, -1.
** Constraint: NUTBOLT32
*Equation
2
BSHANK3m, 2, 1.
NSHANK3m, 2, -1.
** Constraint: NUTBOLT34
*Equation
2
BSHANK3m, 4, 1.
NSHANK3m, 4, -1.
** Constraint: NUTBOLT35
*Equation
2
BSHANK3m, 5, 1.
NSHANK3m, 5, -1.
** Constraint: NUTBOLT36
*Equation
2
BSHANK3m, 6, 1.
NSHANK3m, 6, -1.
** Constraint: W1BOLT
*Tie, name=W1BOLT, adjust=yes
W1BOLTs, W1BOLTm
** Constraint: W1BOT
*Tie, name=W1BOT, adjust=yes
W1BOTs, W1BOTm
** Constraint: W1NUT
*Tie, name=W1NUT, adjust=yes
W1NUTs, W1NUTm
** Constraint: W1TOP
*Tie, name=W1TOP, adjust=yes
W1TOPs, W1TOPm
** Constraint: W2BOLT
*Tie, name=W2BOLT, adjust=yes
W2BOLTs, W2BOLTm
** Constraint: W2BOT
*Tie, name=W2BOT, adjust=yes
W2BOTs, W2BOTm
** Constraint: W2NUT
*Tie, name=W2NUT, adjust=yes
W2NUTs, W2NUTm
** Constraint: W2TOP
*Tie, name=W2TOP, adjust=yes
W2TOPs, W2TOPm
** Constraint: W3BOLT
*Tie, name=W3BOLT, adjust=yes
W3BOLTs, W3BOLTm
** Constraint: W3BOT
*Tie, name=W3BOT, adjust=yes
W3BOTs, W3BOTm
** Constraint: W3NUT
*Tie, name=W3NUT, adjust=yes
W3NUTs, W3NUTm
** Constraint: W3TOP
*Tie, name=W3TOP, adjust=yes
W3TOPs, W3TOPm
**
** MATERIALS
**
*Material, name=STEEL
*Density
7857.8,
*Elastic
 1.9285e+11, 0.29
**
** INTERACTIONS
**
** Interaction: CONTINTERFACE
**Contact Pair, interaction=FRICTLESS, type=SURFACE TO SURFACE
**BOTS, TOPS
** ----------------------------------------------------------------
**
** STEP: PRESTRESS
**
**Step, name=PRESTRESS, nlgeom=YES
**Static
**0.02, 1., 1e-05, 1.
**
** LOADS
**
** Name: BLPULL1   Type: Concentrated force
**Cload
**BSHANK1m, 3, 11580.
** Name: BLPULL2   Type: Concentrated force
**Cload
**BSHANK2m, 3, 11580.
** Name: BLPULL3   Type: Concentrated force
**Cload
**BSHANK3m, 3, 11580.
** Name: NLPUSH1   Type: Concentrated force
**Cload
**NSHANK1m, 3, -11580.
** Name: NLPUSH2   Type: Concentrated force
**Cload
**NSHANK2m, 3, -11580.
** Name: NLPUSH3   Type: Concentrated force
**Cload
**NSHANK3m, 3, -11580.
**
** OUTPUT REQUESTS
**
**Restart, write, frequency=0
**
** FIELD OUTPUT: F-Output-1
**
**Output, field, variable=PRESELECT
**
** HISTORY OUTPUT: H-Output-1
**
**Output, history, variable=PRESELECT
**End Step
** ----------------------------------------------------------------
**
** STEP: FREQ
**
*Step, name=FREQ, nlgeom=NO, perturbation
*Frequency, eigensolver=Lanczos, sim=NO, acoustic coupling=on, normalization=displacement
30, , , , ,
**
** OUTPUT REQUESTS
**
*Restart, write, frequency=0
**
** FIELD OUTPUT: F-Output-2
**
*Output, field, variable=PRESELECT
*End Step
** ----------------------------------------------------------------
**
** STEP: SUBSTRUCTURE
**
*Step, name=SUBSTR, nlgeom=NO
*Substructure Generate, overwrite, type=Z1, mass matrix=YES, recovery matrix=YES, NSET=ENDNDS
**Substructure Generate, overwrite, type=Z1, mass matrix=YES, recovery matrix=YES, NSET=BOLTNUTSHANK
*Select Eigenmodes, generate
1, 26, 1
*Damping Controls, structural=COMBINED, viscous=COMBINED
*Retained Nodal Dofs, sorted=NO
CT, 1, 3
CB, 1, 3
**INTPROXIMSET, 1, 3
*Substructure Matrix Output, FILE NAME=BRB_PRESEXT_MAT, MASS=YES, STIFFNESS=YES, SLOAD=YES, RECOVERY MATRIX=YES
*SUBSTRUCTURE LOAD CASE, NAME=BOLTLOADS
*Cload
BSHANK1m, 3, 1.
*Cload
BSHANK2m, 3, 1.
*Cload
BSHANK3m, 3, 1.
*Cload
NSHANK1m, 3, -1.
*Cload
NSHANK2m, 3, -1.
*Cload
NSHANK3m, 3, -1.
*End Step
